# General Info
filename_size_bits := 64  # Typically 8 bytes (8 charcters) which is 64 bits
filesize_bits := 81920
# This is 10kB
R := 1000000000  # Bits per second
T_healthcheck := 120/R + 16/R  # Request with msg: "are you online?" + Response with msg: "OK"
T_data_req := filename_size_bits/R
T_send_file := filesize_bits/R
k := 3  # # of replica
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# Strategy 1: Lead node sends the file to K nodes itself.
T := k*T_send_file
# Strategy 2: Lead node delegates replication to storage node.
T := k*T_send_file
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# Strategy 1: Lead node sends the file to K nodes itself.
T := k*T_send_file
# Strategy 2: Lead node delegates replication to storage node.
T := T_send_file
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# Strategy 1 & 2:
# Check node online + send data_req + send file from storage to rest server + send file from rest server back to user.
T_total := T_healthcheck + T_data_req + 2*T_send_file
